; Script generated by the pharmML2Nmtran Converter v.0.1.0
; Source	: PharmML 0.6.0
; Target	: NMTRAN 7.3.0
; Model 	: UseCase13_1
; Dated 	: Wed Aug 05 14:51:38 BST 2015

$PROBLEM "UseCase13_1.mdl - generated by MDL2PharmML v.6.0"

$INPUT  ID TIME=DROP CP DV MDV
$DATA "category.csv" IGNORE=#

$PRED
BETA = THETA(1)
LGT0 = THETA(2)
LGT1 = THETA(3)
LGT2 = THETA(4)

ETA_PPV_EVENT = ETA(1)

B0 = LGT0
B1 = (B0+LGT1)
B2 = (B1+LGT2)

MU_1 = B0+CP;
P0 = 1./(1 + EXP(-MU_1));

MU_2 = B1+CP;
P1 = 1./(1 + EXP(-MU_2));

MU_3 = B2+CP;
P2 = 1./(1 + EXP(-MU_3));

PROB0 = P0
PROB1 = (P1-P0)
PROB2 = (P2-P1)
PROB3 = (1-P2)


$THETA
( 0.0 , 1.0 , 10.0 )	;BETA
(-1.09861 )	;LGT0
(1.09861 )	;LGT1
(1.09861 )	;LGT2

$OMEGA
(0.04 )	;PPV_EVENT

$EST METHOD=COND MAXEVALS=9999 PRINT=10 NOABORT
;Sim_start
;$SIM (12345) (12345 UNIFORM) ONLYSIM NOPREDICTION
;Sim_end


$TABLE  ID TIME CP MDV Y DV NOAPPEND NOPRINT FILE=sdtab

$TABLE  ID P0 P1 P2 ETA_PPV_EVENT NOAPPEND NOPRINT FILE=patab
