; Script generated by the pharmML2Nmtran Converter v.0.1.0
; Source	: PharmML 0.6.0
; Target	: NMTRAN 7.3.0
; Model 	: UseCase15
; Dated 	: Wed Aug 05 14:51:47 BST 2015

$PROBLEM "UseCase15.mdl - generated by MDL2PharmML v.6.0"

$INPUT  ID TIME WT=DROP AMT CMT DVID DV MDV LOGTWT
$DATA "warfarin_conc_cmt.csv" IGNORE=@
$SUBS ADVAN13 TOL=9

$MODEL
COMP (COMP1) 	;LATENT
COMP (COMP2) 	;CENTRAL
COMP (COMP3) 	;AD4

$PK
POP_CL = THETA(1)
POP_V = THETA(2)
POP_KA = THETA(3)
POP_TLAG = THETA(4)
POP_KT = THETA(5)
POP_K1 = THETA(6)
RUV_PROP = THETA(7)
RUV_ADD = THETA(8)
BETA_CL_WT = THETA(9)
BETA_V_WT = THETA(10)
POP_P1 = THETA(11)

ETA_CL = ETA(1)
ETA_V = ETA(2)
ETA_KA = ETA(3)
ETA_TLAG = ETA(4)


MU_1 = LOG(POP_CL)+BETA_CL_WT * LOGTWT;
CL = EXP(MU_1 + ETA(1));

MU_2 = LOG(POP_V)+BETA_V_WT * LOGTWT;
V = EXP(MU_2 + ETA(2));

MU_3 = LOG(POP_KA);
KA = EXP(MU_3 + ETA(3));

MU_4 = LOG(POP_TLAG);
TLAG = EXP(MU_4 + ETA(4));

ALAG1 = TLAG ;
F1 = POP_P1 ;
S3 = V ;
K12 = KA ;
K20 = POP_K1 ;
K23 = POP_KT ;
K30 = CL/V ;
A_0(1) = 0.0
A_0(2) = 0.0
A_0(3) = 0.0

$DES
LATENT = A(1)
CENTRAL = A(2)
AD4 = A(3)

F = CENTRAL/S3
CC_DES =  F
DADT(1) = (((K12*AD4-K20*LATENT)+K23*LATENT)-K23*LATENT)
DADT(2) = -(K30*CENTRAL)
DADT(3) = -(K12*AD4)

$ERROR
CC =  F

IPRED = CC
W = RUV_ADD+RUV_PROP*IPRED
Y = IPRED+W*EPS(1)
IRES = DV - IPRED
IWRES = IRES/W

$THETA
( 0.001 , 0.1 )	;POP_CL
( 0.001 , 8.0 )	;POP_V
( 0.001 , 0.362 )	;POP_KA
( 0.001 , 1.0 , 10.0 )	;POP_TLAG
( 0.001 , 1.0 )	;POP_KT
( 0.001 , 0.1 )	;POP_K1
( 0.0 , 0.1 )	;RUV_PROP
( 0.0 , 0.1 )	;RUV_ADD
(0.75  FIX )	;BETA_CL_WT
(1.0  FIX )	;BETA_V_WT
(1.0  FIX )	;POP_P1

$OMEGA BLOCK(2) CORRELATION SD
(0.1 )	;PPV_CL
(0.01 )	;PPV_CL_PPV_V
(0.1 )	;PPV_V

$OMEGA
(0.1 SD )	;PPV_KA
(0.1 SD )	;PPV_TLAG

$SIGMA
1.0 FIX

$EST METHOD=SAEM AUTO=1 PRINT=100


$TABLE  ID TIME AMT CMT DVID MDV LOGTWT PRED IPRED RES IRES WRES IWRES Y DV NOAPPEND NOPRINT FILE=sdtab

$TABLE  ID CL V KA TLAG ALAG1 F1 S3 K12 K20 K23 K30 ETA_CL ETA_V ETA_KA ETA_TLAG NOAPPEND NOPRINT FILE=patab

$TABLE  ID LOGTWT NOAPPEND NOPRINT FILE=cotab
