; Script generated by the pharmML2Nmtran Converter v.0.1.0
; Source	: PharmML 0.6.0
; Target	: NMTRAN 7.3.0
; Model 	: UseCase2
; Dated 	: Wed Aug 05 14:52:05 BST 2015

$PROBLEM "UseCase2.mdl - generated by MDL2PharmML v.6.0"

$INPUT  ID TIME DT WT AMT DVID DV MDV LOGTWT=DROP
$DATA "warfarin_conc_analytic.csv" IGNORE=@

$PRED

IF(AMT.GT.0) THEN
	D  = AMT
ENDIF
POP_CL = THETA(1)
POP_V = THETA(2)
POP_KA = THETA(3)
POP_TLAG = THETA(4)
RUV_PROP = THETA(5)
RUV_ADD = THETA(6)
BETA_CL_WT = THETA(7)
BETA_V_WT = THETA(8)

ETA_CL = ETA(1)
ETA_V = ETA(2)
ETA_KA = ETA(3)
ETA_TLAG = ETA(4)

LOGTWT = LOG(WT/70)


MU_1 = LOG(POP_CL)+BETA_CL_WT * LOGTWT;
CL = EXP(MU_1 + ETA(1));

MU_2 = LOG(POP_V)+BETA_V_WT * LOGTWT;
V = EXP(MU_2 + ETA(2));

MU_3 = LOG(POP_KA);
KA = EXP(MU_3 + ETA(3));

MU_4 = LOG(POP_TLAG);
TLAG = EXP(MU_4 + ETA(4));

K = CL/V
IF ((TIME-DT).LT.TLAG) THEN
	CC = 0
ELSE
	CC = D/V*KA/(KA-K)*(EXP(-(K)*((TIME-DT)-TLAG))-EXP(-(KA)*((TIME-DT)-TLAG)))
ENDIF


IPRED = CC
W = RUV_ADD+RUV_PROP*IPRED
Y = IPRED+W*EPS(1)
IRES = DV - IPRED
IWRES = IRES/W

$THETA
( 0.001 , 0.1 )	;POP_CL
( 0.001 , 8.0 )	;POP_V
( 0.001 , 0.362 )	;POP_KA
( 0.001 , 1.0 , 10.0 )	;POP_TLAG
( 0.0 , 0.1 )	;RUV_PROP
( 0.0 , 0.1 )	;RUV_ADD
(0.75  FIX )	;BETA_CL_WT
(1.0  FIX )	;BETA_V_WT

$OMEGA BLOCK(2) CORRELATION SD
(0.1 )	;PPV_CL
(0.01 )	;PPV_CL_PPV_V
(0.1 )	;PPV_V

$OMEGA
(0.1 SD )	;PPV_KA
(0.1 SD )	;PPV_TLAG

$SIGMA
1.0 FIX

$EST METHOD=SAEM AUTO=1 PRINT=100


$TABLE  ID TIME DT WT AMT DVID MDV PRED IPRED RES IRES WRES IWRES Y DV NOAPPEND NOPRINT FILE=sdtab

$TABLE  ID CL V KA TLAG ETA_CL ETA_V ETA_KA ETA_TLAG NOAPPEND NOPRINT FILE=patab

$TABLE  ID DT WT NOAPPEND NOPRINT FILE=cotab
