; Script generated by the pharmML2Nmtran Converter v.0.1.0
; Source	: PharmML 0.6.0
; Target	: NMTRAN 7.3.0
; Model 	: UseCase9
; Dated 	: Wed Aug 05 14:52:42 BST 2015

$PROBLEM "UseCase9.mdl - generated by MDL2PharmML v.6.0"

$INPUT  ID TIME WT=DROP AMT RATE DV LOGTWT=DROP
$DATA "warfarin_infusion.csv" IGNORE=@
$SUBS ADVAN13 TOL=9

$MODEL
COMP (COMP1) 	;CENTRAL

$PK

IF(AMT.GT.0) THEN
	CENTRAL  = AMT
ENDIF
POP_CL = THETA(1)
POP_V = THETA(2)
RUV_PROP = THETA(3)
RUV_ADD = THETA(4)
BETA_CL_WT = THETA(5)
BETA_V_WT = THETA(6)

ETA_CL = ETA(1)
ETA_V = ETA(2)


MU_1 = LOG(POP_CL)+BETA_CL_WT * LOGTWT;
CL = EXP(MU_1 + ETA(1));

MU_2 = LOG(POP_V)+BETA_V_WT * LOGTWT;
V = EXP(MU_2 + ETA(2));

A_0(1) = 0

$DES
CENTRAL = A(1)

CC_DES =  CENTRAL/V
DADT(1) = -(CL)*CENTRAL/V

$ERROR
CC =  A(1)/V

IPRED = CC
W = RUV_ADD+RUV_PROP*IPRED
Y = IPRED+W*EPS(1)
IRES = DV - IPRED
IWRES = IRES/W

$THETA
( 0.001 , 0.1 )	;POP_CL
( 0.001 , 8.0 )	;POP_V
( 0.0 , 0.1 )	;RUV_PROP
( 0.0 , 0.1 )	;RUV_ADD
(0.75  FIX )	;BETA_CL_WT
(1.0  FIX )	;BETA_V_WT

$OMEGA BLOCK(2) CORRELATION SD
(0.1 )	;PPV_CL
(0.01 )	;PPV_CL_PPV_V
(0.1 )	;PPV_V

$OMEGA 0 FIX

$SIGMA
1.0 FIX

$EST METHOD=SAEM AUTO=1 PRINT=100


$TABLE  ID TIME AMT RATE PRED IPRED RES IRES WRES IWRES Y DV NOAPPEND NOPRINT FILE=sdtab

$TABLE  ID CL V ETA_CL ETA_V NOAPPEND NOPRINT FILE=patab
